# DEFINE NUMBER OF X,Z STEPS
# i, j = hiting location
variable imax equal 30
variable jmax equal 1
variable jstart equal 0
variable jrate equal 5
variable countmax equal "v_jrate*v_imax*(v_imax+1)/2 + v_jstart*v_imax"

# DEFINE TOTAL NUMBER OF STEPS
variable count loop ${countmax}

# START LOOPS

# Loop 1
label start_of_loop_1
variable i loop ${imax}

variable jmax equal "5*v_i"

# Loop 2
label start_of_loop_2
variable j loop ${jmax}
clear

# DEFINE INITIAL CONDITIONS
# small Peridynamic cylinder hit by projectile
units		si
boundary        s s s
dimension	3
atom_style      peri
atom_modify	map array
neighbor        0.0010 bin

# small target
lattice         sc 0.001
region          target cylinder y 0.0 0.0 0.037 -0.0025 0.0 units box
create_box      1 target
create_atoms    1 region target

pair_style      peri/pmb
pair_coeff      * * 1.6863e22 0.0015001 0.0005 0.25
set             group all density 2200
set             group all volume 1.25e-10
velocity        all set 0.0 0.0 0.0 sum no units box
fix             1 all nve
fix             2 all indent 1e16 sphere v_x v_y v_z v_w units box


# Reset current timestep
reset_timestep 0

# spherical indenter to shatter target

# Define indenter velocity (v_q) and radius (v_w)
variable         q equal "1.0"
variable         w equal "0.0020"

#disk radius (v_r)
variable r equal 0.037
variable        y0 equal 0.00510
variable        vy equal -100
variable        y equal "v_y0 + v_q*step*dt*v_vy"

#Hit the disk on inner circle of radius 0.3*R
variable        x equal "cos((2*PI)*v_j/v_jmax)*(v_i/v_imax)*v_r*(0.3)"
variable        z equal "sin((2*PI)*v_j/v_jmax)*(v_i/v_imax)*v_r*(0.3)"

compute         1 all damage/atom
timestep        1.0e-7
thermo          100

dump            ${count} all custom 1000 Data/dump_${count}.peri id type x y z c_1

run             1000

# SAVE INDENTER
print $x file Data/indenter_${count}.txt
print $z append Data/indenter_${count}.txt

next j
next count
jump SELF start_of_loop_2

next i
jump SELF start_of_loop_1
